** written by FreeCAD inp file writer for CalculiX,Abaqus meshes
** highest dimension mesh elements only.

** Nodes
*Node, NSET=Nall
1, 0, 0, 100
2, 0, 0, 0
3, 0, 1.61, 100
4, 0, 1.61, 0
5, 300, 0, 0
6, 300, 0, 100
7, 37, 0, 42
8, 37, 0, 58
9, 53, 0, 58
10, 53, 0, 42
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

** Volume elements
*Element, TYPE=C3D4, ELSET=Evolumes
14303, 1608, 146, 145, 6299
14304, 57, 2641, 480, 6329
14305, 1973, 2490, 2479, 6323
14306, 1794, 11, 266, 6329
14307, 1644, 1127, 1633, 6323
14308, 1448, 1764, 1167, 6327
14309, 513, 514, 2512, 6324
14310, 2294, 2013, 2610, 6327
14311, 299, 1666, 300, 6324
14312, 1113, 1650, 1660, 6307
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
** Define element set Eall
*ELSET, ELSET=Eall
Evolumes


***********************************************************
** Element sets for materials and FEM element type (solid, shell, beam, fluid)
*ELSET,ELSET=mat_fr4Solid
14303,
14304,
14305,
14306,
14307,
14308,
14309,
14310,
14311,
14312,
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*ELSET,ELSET=mat_viaSolid
14619,
14728,
14859,
15702,
15703,
15975,
15976,
15977,
16480,
16712,
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*ELSET,ELSET=mat_alSolid
21546,
21547,
21548,
21549,
21550,
21551,
21552,
21553,
21554,
21555,
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*ELSET,ELSET=mat_timSolid
28959,
28960,
28961,
28962,
28963,
28964,
28965,
28966,
28967,
28968,
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*ELSET,ELSET=mat_ss316Solid
35803,
35804,
35805,
35806,
35807,
35808,
35809,
35810,
35811,
35812,
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
***********************************************************
** constraints bodyheatsource element sets
** q_buck_sic_mosfet
** q_buck_sic_mosfet.Stack.Solid2
*ELSET,ELSET=q_buck_sic_mosfet_0
20430,
20431,
20432,
20433,
20434,
20435,
20436,
20437,
20438,
20439,
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
** q_buck_diode
** q_buck_diode.Stack.Solid3
*ELSET,ELSET=q_buck_diode_0
20515,
20516,
20517,
20518,
20519,
20520,
20521,
20522,
20523,
20524,
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
** q_buck_inductor
** q_buck_inductor.Stack.Solid4
*ELSET,ELSET=q_buck_inductor_0
20563,
20564,
20565,
20566,
20567,
20568,
20569,
20570,
20571,
20572,
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
** q_flyback_aux
** q_flyback_aux.Stack.Solid5
*ELSET,ELSET=q_flyback_aux_0
20683,
20684,
20685,
20686,
20687,
20688,
20689,
20690,
20691,
20692,
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
** q_pfc_mosfet
** q_pfc_mosfet.Stack.Solid6
*ELSET,ELSET=q_pfc_mosfet_0
20768,
20769,
20770,
20771,
20772,
20773,
20774,
20775,
20776,
20777,
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
** q_pfc_diode
** q_pfc_diode.Stack.Solid7
*ELSET,ELSET=q_pfc_diode_0
20856,
20857,
20858,
20859,
20860,
20861,
20862,
20863,
20864,
20865,
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
** q_pfc_inductor
** q_pfc_inductor.Stack.Solid8
*ELSET,ELSET=q_pfc_inductor_0
20904,
20905,
20906,
20907,
20908,
20909,
20910,
20911,
20912,
20913,
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
** q_dcdc_primary
** q_dcdc_primary.Stack.Solid9
*ELSET,ELSET=q_dcdc_primary_0
21029,
21030,
21031,
21032,
21033,
21034,
21035,
21036,
21037,
21038,
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
** q_dcdc_sr
** q_dcdc_sr.Stack.Solid10
*ELSET,ELSET=q_dcdc_sr_0
21137,
21138,
21139,
21140,
21141,
21142,
21143,
21144,
21145,
21146,
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
** q_dcdc_output
** q_dcdc_output.Stack.Solid11
*ELSET,ELSET=q_dcdc_output_0
21254,
21255,
21256,
21257,
21258,
21259,
21260,
21261,
21262,
21263,
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
** q_dcdc_transformer
** q_dcdc_transformer.Stack.Solid12
*ELSET,ELSET=q_dcdc_transformer_0
21342,
21343,
21344,
21345,
21346,
21347,
21348,
21349,
21350,
21351,
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

***********************************************************
** constraints initial temperature node sets
** InitialTemperature

** Physical constants for SI(mm) unit system with Kelvins
*PHYSICAL CONSTANTS, ABSOLUTE ZERO=0, STEFAN BOLTZMANN=5.670374419e-11

***********************************************************
** Materials
** see information about units at file end
** FreeCAD material name: fr4
** mat_fr4
*MATERIAL, NAME=mat_fr4
*ELASTIC
1000,0.3
*CONDUCTIVITY
0.3
*EXPANSION, ZERO=0
0
*SPECIFIC HEAT
1000000000
** FreeCAD material name: via
** mat_via
*MATERIAL, NAME=mat_via
*ELASTIC
1000,0.3
*CONDUCTIVITY
96.475
*EXPANSION, ZERO=0
0
*SPECIFIC HEAT
1000000000
** FreeCAD material name: al
** mat_al
*MATERIAL, NAME=mat_al
*ELASTIC
1000,0.3
*CONDUCTIVITY
160
*EXPANSION, ZERO=0
0
*SPECIFIC HEAT
1000000000
** FreeCAD material name: tim
** mat_tim
*MATERIAL, NAME=mat_tim
*ELASTIC
1000,0.3
*CONDUCTIVITY
3
*EXPANSION, ZERO=0
0
*SPECIFIC HEAT
1000000000
** FreeCAD material name: ss316
** mat_ss316
*MATERIAL, NAME=mat_ss316
*ELASTIC
1000,0.3
*CONDUCTIVITY
16
*EXPANSION, ZERO=0
0
*SPECIFIC HEAT
1000000000

***********************************************************
** Initial temperature constraint
*INITIAL CONDITIONS,TYPE=TEMPERATURE
** InitialTemperature
Nall,323.15

***********************************************************
** Sections
*SOLID SECTION, ELSET=mat_fr4Solid, MATERIAL=mat_fr4
*SOLID SECTION, ELSET=mat_viaSolid, MATERIAL=mat_via
*SOLID SECTION, ELSET=mat_alSolid, MATERIAL=mat_al
*SOLID SECTION, ELSET=mat_timSolid, MATERIAL=mat_tim
*SOLID SECTION, ELSET=mat_ss316Solid, MATERIAL=mat_ss316

***********************************************************
** At least one step is needed to run an CalculiX analysis of FreeCAD
*STEP, INC=2000
*HEAT TRANSFER, STEADY STATE
1.0,1.0,1e-05,1.0

***********************************************************
** Body Heat Source Constraints
** q_buck_sic_mosfet
*DFLUX
q_buck_sic_mosfet_0,BF,44.57006987578

** q_buck_diode
*DFLUX
q_buck_diode_0,BF,36.01621808144

** q_buck_inductor
*DFLUX
q_buck_inductor_0,BF,7.203243616287

** q_flyback_aux
*DFLUX
q_flyback_aux_0,BF,8.23932057295

** q_pfc_mosfet
*DFLUX
q_pfc_mosfet_0,BF,43.77931296742

** q_pfc_diode
*DFLUX
q_pfc_diode_0,BF,39.72567287785

** q_pfc_inductor
*DFLUX
q_pfc_inductor_0,BF,8.276181849551

** q_dcdc_primary
*DFLUX
q_dcdc_primary_0,BF,26.62037037037

** q_dcdc_sr
*DFLUX
q_dcdc_sr_0,BF,22.81746031746

** q_dcdc_output
*DFLUX
q_dcdc_output_0,BF,19.25223214286

** q_dcdc_transformer
*DFLUX
q_dcdc_transformer_0,BF,7.301587301587


***********************************************************
** constraints heatflux element face heatflux
** Convection
*FILM
** Stack.Face85
35804,F1,323.15,0.049898963
35813,F1,323.15,0.049898963
35816,F1,323.15,0.049898963
35822,F1,323.15,0.049898963
35826,F1,323.15,0.049898963
35827,F3,323.15,0.049898963
35829,F3,323.15,0.049898963
35839,F3,323.15,0.049898963
35843,F1,323.15,0.049898963
35850,F4,323.15,0.049898963
35852,F1,323.15,0.049898963
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
***********************************************************
** Outputs --> frd file
*NODE FILE
U, NT
*EL FILE
S, E, HFL
*OUTPUT, FREQUENCY=1
***********************************************************
*END STEP

***********************************************************
** CalculiX Input file
**   written by    --> FreeCAD 1.1.1
**   written on    --> Sun Jun 28 19:28:53 2026
**   file name     -->
**   analysis name --> Analysis
**
**
***********************************************************
**  About units:
**  See ccx manual, ccx does not know about any unit.
**  Golden rule: The user must make sure that the numbers they provide have consistent units.
**  The user is the FreeCAD calculix writer module ;-)
**
**  The unit system which is used at Guido Dhondt's company: mm, N, s, K
**  Since Length and Mass are connected by Force, if Length is mm the Mass is in t to get N
**  The following units are used to write to inp file:
**
**  Length: mm (this includes the mesh geometry)
**  Mass: t
**  TimeSpan: s
**  Temperature: K
**
**  This leads to:
**  Force: N
**  Pressure: N/mm^2 == MPa (Young's Modulus has unit Pressure)
**  Density: t/mm^3
**  Gravity: mm/s^2
**  Thermal conductivity: t*mm/K/s^3 == as W/m/K == kW/mm/K
**  Specific Heat: mm^2/s^2/K = J/kg/K == kJ/t/K
**
